// COMSOL Multiphysics 6.3.0.290 model "Q1Automation_Model.mph"
// Outline of the model tree

Parameters
  rad0 = 0.02[m]  // Herb radius
  L = 0.001[m]  // Short insulated axial slice
  alphaT = 0.36/(820*2600)[m^2/s]  // Thermal diffusivity
  betaT = 25/(820*2600)[m/s]  // Normalized heat transfer coefficient
  hm = 8e-7[m/s]

Functions
  Te: Interpolation "插值"
    funcnametable = {Te, 1}
    source = file
    filename = D:\26mathmodel\CUMCM2026Problems\A题\comsol_q1\ambient_temperature.txt
    filecolumns = 2
    columnKeys = {col1, col2}
    columnType = {col1, arg, col2, value}
    funcnames = {col1, Te, col2, Te}
    argunit = s
  Ce: Interpolation "插值 2"
    funcnametable = {Ce, 1}
    source = file
    filename = D:\26mathmodel\CUMCM2026Problems\A题\comsol_q1\ambient_moisture.txt
    filecolumns = 2
    columnKeys = {col1, col2}
    columnType = {col1, arg, col2, value}
    funcnames = {col1, Ce, col2, Ce}
    argunit = s

Variables
  var1 "变量 1"
    Dmoist = 7e-9[m^2/s]*exp(-0.89/max(C,1e-6))

Geometry
  geom1 "几何 1" (2D, length unit m)
    r1: Rectangle "矩形 1" | size = {rad0, L}
    fin: Finalize "形成联合体"

Physics
  heat: CoefficientFormPDE "系数形式偏微分方程" on all domains
    dependent variable T
    cfeq1: CoefficientFormPDE "系数形式偏微分方程 1" (default) | c = {x*alphaT, 0, 0, x*alphaT}; f = 0; da = x
    zflx1: ZeroFluxBoundary "零通量 1" (default)
    init1: init "初始值 1" (default) | T = 28
    flux1: FluxBoundary "通量/源 1" on boundaries 4 | g = rad0*betaT*Te(t); q = rad0*betaT
  mass: CoefficientFormPDE "系数形式偏微分方程 2" on all domains
    dependent variable C
    cfeq1: CoefficientFormPDE "系数形式偏微分方程 1" (default) | c = {x*Dmoist, 0, 0, x*Dmoist}; f = 0; da = x
    zflx1: ZeroFluxBoundary "零通量 1" (default)
    init1: init "初始值 1" (default) | C = 2.55
    flux1: FluxBoundary "通量/源 1" on boundaries 4 | g = rad0*hm*Ce(t); q = rad0*hm

Mesh
  mesh1 "网格 1" (physics-controlled)
    size: MeshSizeDefault "大小" | hauto = 2

Studies
  std1 "研究 1"
    time: Transient "瞬态" | tlist = {0, 100, 300, 600, 900, 1200, 1500, 1800}; rtol = 1e-5

Solver configurations
  sol1 "解 1" (study std1)
    v1: Variables "因变量 1"
    t1: Time "瞬态求解器 1"
      dDef: Direct "直接"
      fc1: FullyCoupled "全耦合 1"

Datasets
  dset1: Solution | solution = sol1
  cpt1: CutPoint2D "二维截点 1"
    data = dset1
    pointx = 0 0.001 0.002 0.003 0.004 0.005 0.006 0.007 0.008 0.009 0.01 0.011 0.012 0.013 0.014 0.015 0.016 0.017 0.018 0.019 0.02
    pointy = 5.0E-4 5.0E-4 5.0E-4 5.0E-4 5.0E-4 5.0E-4 5.0E-4 5.0E-4 5.0E-4 5.0E-4 5.0E-4 5.0E-4 5.0E-4 5.0E-4 5.0E-4 5.0E-4 5.0E-4 5.0E-4 5.0E-4 5.0E-4 5.0E-4

Exports
  data1: Data "数据 1"
    data = cpt1
    expr = {T, C}
    descr = {Temperature, Moisture}
    filename = D:\26mathmodel\CUMCM2026Problems\A题\comsol_q1\q1_comsol_profiles.csv
    separator = ,