// COMSOL Multiphysics 6.3.0.290 model "q4_shrinking_herb_comsol.mph"
// Outline of the model tree

Parameters
  R0 = 0.02[m]  // Initial herb radius
  L = 0.08[m]  // Representative cylinder length; ends insulated
  hT = 25[W/(m^2*K)]  // Convective heat transfer coefficient
  hm = 8e-7[m/s]  // Convective moisture transfer coefficient

Functions
  Te: Interpolation "插值"
    funcnametable = {Te, 1}
    source = file
    filename = D:\26mathmodel\CUMCM2026Problems\A题\comsol_q4\near_surface_check\graded80\ambient_temperature.txt
    filecolumns = 2
    columnKeys = {col1, col2}
    columnType = {col1, arg, col2, value}
    funcnames = {col1, Te, col2, Te}
    fununit = 1
    argunit = s
  Ce: Interpolation "插值 2"
    funcnametable = {Ce, 1}
    source = file
    filename = D:\26mathmodel\CUMCM2026Problems\A题\comsol_q4\near_surface_check\graded80\ambient_moisture.txt
    filecolumns = 2
    columnKeys = {col1, col2}
    columnType = {col1, arg, col2, value}
    funcnames = {col1, Ce, col2, Ce}
    fununit = 1
    argunit = s
  Rt: Interpolation "插值 3"
    funcnametable = {Rt, 1}
    source = file
    filename = D:\26mathmodel\CUMCM2026Problems\A题\comsol_q4\near_surface_check\graded80\radius_history.txt
    filecolumns = 2
    columnKeys = {col1, col2}
    columnType = {col1, arg, col2, value}
    funcnames = {col1, Rt, col2, Rt}
    fununit = m
    argunit = s

Variables
  var1 "变量 1"
    Csafe = max(C,1e-6)
    rho = 760[kg/m^3]+90[kg/m^3]*Csafe
    cp = 1850[J/(kg*K)]+2150[J/(kg*K)]*Csafe/(Csafe+1)
    kherb = 0.12[W/(m*K)]+0.20[W/(m*K)]*Csafe/(Csafe+1)
    Dherb = 4.2e-4[m^2/s]*exp(-0.30/Csafe)*exp(-3850/(T+273.15))
    shrink = R0/Rt(t)
    rphys = x*Rt(t)/R0

Geometry
  geom1 "几何 1" (2D, length unit m)
    r1: Rectangle "矩形 1" | size = {R0, L}
    fin: Finalize "形成联合体"

Physics
  heat: CoefficientFormPDE "系数形式偏微分方程" on all domains
    dependent variable T
    cfeq1: CoefficientFormPDE "系数形式偏微分方程 1" (default)
      c = {x*kherb*shrink^2, 0, 0, x*kherb*shrink^2}
      f = 0
      da = x*rho*cp
    zflx1: ZeroFluxBoundary "零通量 1" (default)
    init1: init "初始值 1" (default) | T = 28
    flux1: FluxBoundary "通量/源 1" on boundaries 4 | g = R0*hT*shrink*Te(t); q = R0*hT*shrink
  mass: CoefficientFormPDE "系数形式偏微分方程 2" on all domains
    dependent variable C
    cfeq1: CoefficientFormPDE "系数形式偏微分方程 1" (default) | c = {x*Dherb*shrink^2, 0, 0, x*Dherb*shrink^2}; f = 0; da = x
    zflx1: ZeroFluxBoundary "零通量 1" (default)
    init1: init "初始值 1" (default) | C = 2.55
    flux1: FluxBoundary "通量/源 1" on boundaries 4 | g = R0*hm*shrink*Ce(t); q = R0*hm*shrink

Mesh
  mesh1 "网格 1"
    size: MeshSizeDefault "大小" | hmax = 0.00536; hmin = 2.4E-5; hcurve = 0.3; hgrad = 1.3
    map1: Map "映射 1" on remaining entities
      rad: Distribution "分布" on boundaries 2, 3
        explicit = {0, 0.000385481879639, 0.00154133313344, 0.00346577152254, 0.00615582970243, 0.00960735979838, 0.0138150398012, 0.0187723817732, 0.0244717418524, 0.0309043320388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}
      ax: Distribution "分布 2" on boundaries 1, 4 | numelem = 4

Studies
  std1 "研究 1"
    time: Transient "瞬态" | tlist = range(0,600,183600) 183915.71747843814 184200; rtol = 1e-6

Solver configurations
  sol1 "解 1" (study std1)
    v1: Variables "因变量 1"
    t1: Time "瞬态求解器 1"
      dDef: Direct "直接"
      fc1: FullyCoupled "全耦合 1"

Datasets
  dset1: Solution | solution = sol1
  cpt1: CutPoint2D "二维截点 1"
    data = dset1
    pointx = 0 2.0E-5 4.0E-5 6e-05 8.0E-5 1.0E-4 0.00012 0.00014 1.6E-4 1.8E-4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
    pointy = 0.04 0.04 0.04 0.04 0.04 0.04 0.04 0.04 0.04 0.04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

Plots
  pgC: PlotGroup2D "Moisture field in shrinking herb reference domain" | data = dset1
    surf1: Surface "表面 1" | expr = C
  pgT: PlotGroup2D "Temperature field in shrinking herb reference domain" | data = dset1
    surf1: Surface "表面 1" | expr = T

Exports
  data1: Data "数据 1"
    data = cpt1
    expr = {T, C, rphys, Rt(t)}
    descr = {Temperature, Moisture, Physical radius, Herb radius}
    filename = D:\26mathmodel\CUMCM2026Problems\A题\comsol_q4\near_surface_check\graded80\q4_comsol_profiles.csv
    separator = ,